// COMSOL Multiphysics 5.6.0.401 model "single_run_RCS_3.mph"
// July 29, 2025
// Outline of the model tree

Parameters
  r_sim = 9 [mm]  // Radius of the simulation domain
  z_sim = 7 [mm]  // Height of the simulation domain
  r_re = 7 [mm]  // Innter radius of the return electrode
  t_re = 250[um]  // thickness of the return electrode
  r_ae = 5 [um]  // Radius of the active electrode
  h_sub = 10[um]  // Height of the substrate
  rho_saline = 60 [ohm * cm]  // resistivity of saline
  V_return = 0 [V]  // voltage set at the return electrode
  I_active = 1 [uA]  // current at the active electrode
  z_cut = 0 [um]  // z location of the cut line
  r_cut_lim = 30*33 [um]  // lenght of the cut line, starting from 0 and ending at this value
  t_NFL_GCL = 24.38 [um]  // NFL + GCL
  t_IPL = 67.5 [um]  // IPL
  t_nu = 34.12[um]  // Nuclear layer
  rho_NFL_GCL = 3026 [ohm*cm]  // NFL + GCL layer
  rho_IPL = 1712 [ohm*cm]  // IPL (800)
  rho_nu = 2167 [ohm*cm]  // Nuclear layer
  rho_PR = 60 [ohm*cm]  // PL layer
  r_layer = 1.5 [mm]  // Layer redius
  ep_water = 80  // relative permittivity of water
  ep_saline = ep_water  // relative permittivity of saline
  ep_layers = ep_water  // relative permittivity of retinal layers
  z_st = -2[um]  // start z
  z_en = 2 [um]  // end z
  r_st = 0 [um]  // r start
  r_en = 1[mm]  // r_end
  flag = 1  // 0 or 1. 0 -> retinal layers = saline, 1 -> ratinal layers with correct rho
  z_plug_bottom = 200 [um] + t_mem  // z location of the metal
  t_mem = 38 [um]  // Membrane thickness
  t_PR = 54.75[um]  // PR(IS-OS) layer
  z_re = t_re/2 + 600 [um]  // z-height of return electrode
  r_cut_lim2 = 33.54*33[um]  // length of the second cut line, starting at 0 and ending at this value
  r_plug_in = 5[mm]  // inner radius of the plug
  t_plug_top = 3[mm]  // top end height of the plug
  t_plug_mid = 3 [mm]  // mid end height of the plug
  t_plug_bottom = z_sim - z_plug_bottom - t_plug_mid - t_plug_top  // bottom end height of plug
  w_plug_bottom = 1 [mm]  // bottom width of the plug
  w_plug_mid = 0.5 [mm]  // mid widht of the plug
  w_plug_top = 3 [mm]  // top widht of the plug
  w_chamber_wall = r_sim - r_plug_in - w_plug_top - gap_plug  // width of the chamber wall
  w_shelf = 1.5 [mm]  // shelf width with chamber wall
  t_shelf = 0.5 [mm]  // shelf height
  z_shelf = 1 [mm]  // z location of the bottom of the shelf
  w_sleeve = 0.5 [mm]  // sleeve width
  w_ring = 1.5[mm]  // ring width
  t_ring = 1[mm]  // ring height
  gap_plug = 100 [um]  // gap between plug and wall
  ep_plastic = 3.7  // dielectric constant of the plastic (Delrin)
  sigma_plastic = 1e-13 [S/m]  // conductivity of the plastic Delrin

Geometry
  geom1 "Geometry 1" (2D axisymmetric, length unit mm)
    r1: Rectangle "Substrate" | pos = {0, -h_sub}; size = {r_sim, h_sub}
    r3: Rectangle "Saline box" | size = {r_sim, z_sim}
    r5: Rectangle "NFL_GCL" | size = {r_layer, t_NFL_GCL}
    r6: Rectangle "IPL" | pos = {0, t_NFL_GCL}; size = {r_layer, t_IPL}
    r7: Rectangle "Nuclear" | pos = {0, t_NFL_GCL+t_IPL}; size = {r_layer, t_nu}
    r8: Rectangle "PR" (disabled) | pos = {0, t_NFL_GCL+t_IPL+t_nu}; size = {r_layer, t_PR}
    r2: Rectangle "Active electrode (rect)" (disabled) | size = {r_ae, h_ae}
    r4: Rectangle "Return electrode (rect)" (disabled) | pos = {r_re, 0}; size = {t_re, t_re}
    c2: Circle "Active electrode (circ)" | r = r_ae; angle = 90
    c1: Circle "Return electrode (circ)" | pos = {r_re, z_re}; r = t_re/2
    r10: Rectangle "Active electrode (rect)" (disabled) | size = {r_ae, h_ae}
    fil1: Fillet "Fillet - Active electrode (rect)" (disabled) | point = r10(1) points 3; radius = fillet_r_ae
    r9: Rectangle "probe_box" (disabled) | pos = {r_st, z_st}; size = {r_en-r_st, z_en-z_st}
    r11: Rectangle "Metal plug" (disabled) | pos = {r_plug_in, z_plug}; size = {r_plug_out - r_plug_in, z_sim - z_plug}
    pol1: Polygon "Plug - Polygon 1"
      source = table
      table = 
        {r_plug_in, z_plug_bottom}
        {r_plug_in + w_plug_bottom, z_plug_bottom}
        {r_plug_in+w_plug_bottom, z_plug_bottom + t_plug_bottom}
        {r_plug_in + w_plug_mid, z_plug_bottom + t_plug_bottom}
        {r_plug_in + w_plug_mid, z_plug_bottom + t_plug_bottom + t_plug_mid}
        {r_plug_in + w_plug_top, z_plug_bottom + t_plug_bottom + t_plug_mid}
        {r_plug_in + w_plug_top, z_plug_bottom + t_plug_bottom + t_plug_mid + t_plug_top}
        {r_plug_in, z_plug_bottom + t_plug_bottom + t_plug_mid + t_plug_top}
        {r_plug_in, z_plug_bottom}
    pol2: Polygon "Chamber wall - Polygon 2"
      source = table
      table = 
        {r_sim, 0}
        {r_sim, z_sim}
        {r_sim - w_chamber_wall, z_sim}
        {r_sim - w_chamber_wall, z_shelf + t_shelf}
        {r_sim - w_chamber_wall - w_shelf, z_shelf + t_shelf}
        {r_sim - w_chamber_wall - w_shelf, z_shelf}
        {r_sim - w_chamber_wall, z_shelf}
        {r_sim - w_chamber_wall, 0}
        {r_sim, 0}
    pol3: Polygon "Ring"
      source = table
      table = 
        {r_plug_in + w_plug_mid, z_plug_bottom + t_plug_bottom}
        {r_plug_in + w_plug_mid + w_sleeve, z_plug_bottom + t_plug_bottom}
        {r_plug_in + w_plug_mid + w_sleeve, z_shelf + t_shelf}
        {r_plug_in + w_plug_mid + w_sleeve + w_ring, z_shelf + t_shelf}
        {r_plug_in + w_plug_mid + w_sleeve + w_ring, z_shelf + t_shelf + t_ring}
        {r_plug_in + w_plug_mid + w_sleeve, z_shelf + t_shelf + t_ring}
        {r_plug_in + w_plug_mid + w_sleeve, z_plug_bottom + t_plug_bottom + t_plug_mid}
        {r_plug_in + w_plug_mid, z_plug_bottom + t_plug_bottom + t_plug_mid}
        {r_plug_in + w_plug_mid, z_plug_bottom + t_plug_bottom}
    uni1: Union "Insulator walls - Union 1" | input = pol2, pol3
    fin: Finalize "Form Union"

Materials
  mat1: Common "Saline" on all domains
    def "Basic"
      thermalexpansioncoefficient = alpha_p(T)
      bulkviscosity = muB(T)
      dynamicviscosity = eta(T)
      ratioofspecificheat = gamma_w(T)
      electricconductivity = 1/rho_saline
      heatcapacity = Cp(T)
      density = rho(T)
      thermalconductivity = k(T)
      soundspeed = cs(T)
      relpermittivity = ep_saline
      eta: Piecewise
        arg = T
        pieces = 
          {273.15, 413.15, 1.3799566804-0.021224019151*T^1+1.3604562827E-4*T^2-4.6454090319E-7*T^3+8.9042735735E-10*T^4-9.0790692686E-13*T^5+3.8457331488E-16*T^6}
          {413.15, 553.75, 0.00401235783-2.10746715E-5*T^1+3.85772275E-8*T^2-2.39730284E-11*T^3}
        argunit = K
        fununit = Pa*s
      Cp: Piecewise | arg = T; pieces = {273.15, 553.75, 12010.1471-80.4072879*T^1+0.309866854*T^2-5.38186884E-4*T^3+3.62536437E-7*T^4}; argunit = K; fununit = J/(kg*K)
      rho: Piecewise
        arg = T
        smooth = contd1
        pieces = 
          {273.15, 293.15, 6.3092789034e-05*T^3-0.0603676398829*T^2+18.9229382407066*T-950.704055329848}
          {293.15, 373.15, 1.0335053319e-05*T^3-0.0133950656345*T^2+4.96928883266*T+432.257114008512}
        argunit = K
        fununit = kg/m^3
      k: Piecewise | arg = T; pieces = {273.15, 553.75, -0.869083936+0.00894880345*T^1-1.58366345E-5*T^2+7.97543259E-9*T^3}; argunit = K; fununit = W/(m*K)
      cs: Interpolation | table = {{273, 1403}, {278, 1427}, {283, 1447}, {293, 1481}, {303, 1507}, {313, 1526}, {323, 1541}, {333, 1552}, {343, 1555}, {353, 1555}, {363, 1550}, {373, 1543}}; interp = piecewisecubic; argunit = K; fununit = m/s
      an1: Analytic | funcname = alpha_p; expr = -1/rho(T)*d(rho(T),T); args = T; argunit = K; fununit = 1/K
      an2: Analytic | funcname = gamma_w; expr = 1+(T/Cp(T))*(alpha_p(T)*cs(T))^2; args = T; argunit = K; fununit = 1
      an3: Analytic | funcname = muB; expr = 2.79*eta(T); args = T; argunit = K; fununit = Pa*s
  mat7: Common "Glass (quartz)" on domains 1
    def "Basic"
      relpermeability = 1
      electricconductivity = 1e-14[S/m]
      relpermittivity = 4.2
      density = 2210[kg/m^3]
      thermalconductivity = 1.4[W/(m*K)]
      heatcapacity = 730[J/(kg*K)]
    RefractiveIndex
      n = 1.5
      ki = 0
  mat3: Common "NFL_GCL" on domains 3
    def "Basic"
      thermalexpansioncoefficient = alpha_p(T)
      bulkviscosity = muB(T)
      dynamicviscosity = eta(T)
      ratioofspecificheat = gamma_w(T)
      electricconductivity = (1/rho_NFL_GCL)*flag+(1/rho_saline)*(1-flag)
      heatcapacity = Cp(T)
      density = rho(T)
      thermalconductivity = k(T)
      soundspeed = cs(T)
      relpermittivity = ep_layers
      eta: Piecewise
        arg = T
        pieces = 
          {273.15, 413.15, 1.3799566804-0.021224019151*T^1+1.3604562827E-4*T^2-4.6454090319E-7*T^3+8.9042735735E-10*T^4-9.0790692686E-13*T^5+3.8457331488E-16*T^6}
          {413.15, 553.75, 0.00401235783-2.10746715E-5*T^1+3.85772275E-8*T^2-2.39730284E-11*T^3}
        argunit = K
        fununit = Pa*s
      Cp: Piecewise | arg = T; pieces = {273.15, 553.75, 12010.1471-80.4072879*T^1+0.309866854*T^2-5.38186884E-4*T^3+3.62536437E-7*T^4}; argunit = K; fununit = J/(kg*K)
      rho: Piecewise
        arg = T
        smooth = contd1
        pieces = 
          {273.15, 293.15, 6.3092789034e-05*T^3-0.0603676398829*T^2+18.9229382407066*T-950.704055329848}
          {293.15, 373.15, 1.0335053319e-05*T^3-0.0133950656345*T^2+4.96928883266*T+432.257114008512}
        argunit = K
        fununit = kg/m^3
      k: Piecewise | arg = T; pieces = {273.15, 553.75, -0.869083936+0.00894880345*T^1-1.58366345E-5*T^2+7.97543259E-9*T^3}; argunit = K; fununit = W/(m*K)
      cs: Interpolation | table = {{273, 1403}, {278, 1427}, {283, 1447}, {293, 1481}, {303, 1507}, {313, 1526}, {323, 1541}, {333, 1552}, {343, 1555}, {353, 1555}, {363, 1550}, {373, 1543}}; interp = piecewisecubic; argunit = K; fununit = m/s
      an1: Analytic | funcname = alpha_p; expr = -1/rho(T)*d(rho(T),T); args = T; argunit = K; fununit = 1/K
      an2: Analytic | funcname = gamma_w; expr = 1+(T/Cp(T))*(alpha_p(T)*cs(T))^2; args = T; argunit = K; fununit = 1
      an3: Analytic | funcname = muB; expr = 2.79*eta(T); args = T; argunit = K; fununit = Pa*s
  mat4: Common "IPL" on domains 4
    def "Basic"
      thermalexpansioncoefficient = alpha_p(T)
      bulkviscosity = muB(T)
      dynamicviscosity = eta(T)
      ratioofspecificheat = gamma_w(T)
      electricconductivity = (1/rho_IPL)*flag+(1/rho_saline)*(1-flag)
      heatcapacity = Cp(T)
      density = rho(T)
      thermalconductivity = k(T)
      soundspeed = cs(T)
      relpermittivity = ep_layers
      eta: Piecewise
        arg = T
        pieces = 
          {273.15, 413.15, 1.3799566804-0.021224019151*T^1+1.3604562827E-4*T^2-4.6454090319E-7*T^3+8.9042735735E-10*T^4-9.0790692686E-13*T^5+3.8457331488E-16*T^6}
          {413.15, 553.75, 0.00401235783-2.10746715E-5*T^1+3.85772275E-8*T^2-2.39730284E-11*T^3}
        argunit = K
        fununit = Pa*s
      Cp: Piecewise | arg = T; pieces = {273.15, 553.75, 12010.1471-80.4072879*T^1+0.309866854*T^2-5.38186884E-4*T^3+3.62536437E-7*T^4}; argunit = K; fununit = J/(kg*K)
      rho: Piecewise
        arg = T
        smooth = contd1
        pieces = 
          {273.15, 293.15, 6.3092789034e-05*T^3-0.0603676398829*T^2+18.9229382407066*T-950.704055329848}
          {293.15, 373.15, 1.0335053319e-05*T^3-0.0133950656345*T^2+4.96928883266*T+432.257114008512}
        argunit = K
        fununit = kg/m^3
      k: Piecewise | arg = T; pieces = {273.15, 553.75, -0.869083936+0.00894880345*T^1-1.58366345E-5*T^2+7.97543259E-9*T^3}; argunit = K; fununit = W/(m*K)
      cs: Interpolation | table = {{273, 1403}, {278, 1427}, {283, 1447}, {293, 1481}, {303, 1507}, {313, 1526}, {323, 1541}, {333, 1552}, {343, 1555}, {353, 1555}, {363, 1550}, {373, 1543}}; interp = piecewisecubic; argunit = K; fununit = m/s
      an1: Analytic | funcname = alpha_p; expr = -1/rho(T)*d(rho(T),T); args = T; argunit = K; fununit = 1/K
      an2: Analytic | funcname = gamma_w; expr = 1+(T/Cp(T))*(alpha_p(T)*cs(T))^2; args = T; argunit = K; fununit = 1
      an3: Analytic | funcname = muB; expr = 2.79*eta(T); args = T; argunit = K; fununit = Pa*s
  mat5: Common "Nuclear layer" on domains 5
    def "Basic"
      thermalexpansioncoefficient = alpha_p(T)
      bulkviscosity = muB(T)
      dynamicviscosity = eta(T)
      ratioofspecificheat = gamma_w(T)
      electricconductivity = (1/rho_nu)*flag+(1/rho_saline)*(1-flag)
      heatcapacity = Cp(T)
      density = rho(T)
      thermalconductivity = k(T)
      soundspeed = cs(T)
      relpermittivity = ep_layers
      eta: Piecewise
        arg = T
        pieces = 
          {273.15, 413.15, 1.3799566804-0.021224019151*T^1+1.3604562827E-4*T^2-4.6454090319E-7*T^3+8.9042735735E-10*T^4-9.0790692686E-13*T^5+3.8457331488E-16*T^6}
          {413.15, 553.75, 0.00401235783-2.10746715E-5*T^1+3.85772275E-8*T^2-2.39730284E-11*T^3}
        argunit = K
        fununit = Pa*s
      Cp: Piecewise | arg = T; pieces = {273.15, 553.75, 12010.1471-80.4072879*T^1+0.309866854*T^2-5.38186884E-4*T^3+3.62536437E-7*T^4}; argunit = K; fununit = J/(kg*K)
      rho: Piecewise
        arg = T
        smooth = contd1
        pieces = 
          {273.15, 293.15, 6.3092789034e-05*T^3-0.0603676398829*T^2+18.9229382407066*T-950.704055329848}
          {293.15, 373.15, 1.0335053319e-05*T^3-0.0133950656345*T^2+4.96928883266*T+432.257114008512}
        argunit = K
        fununit = kg/m^3
      k: Piecewise | arg = T; pieces = {273.15, 553.75, -0.869083936+0.00894880345*T^1-1.58366345E-5*T^2+7.97543259E-9*T^3}; argunit = K; fununit = W/(m*K)
      cs: Interpolation | table = {{273, 1403}, {278, 1427}, {283, 1447}, {293, 1481}, {303, 1507}, {313, 1526}, {323, 1541}, {333, 1552}, {343, 1555}, {353, 1555}, {363, 1550}, {373, 1543}}; interp = piecewisecubic; argunit = K; fununit = m/s
      an1: Analytic | funcname = alpha_p; expr = -1/rho(T)*d(rho(T),T); args = T; argunit = K; fununit = 1/K
      an2: Analytic | funcname = gamma_w; expr = 1+(T/Cp(T))*(alpha_p(T)*cs(T))^2; args = T; argunit = K; fununit = 1
      an3: Analytic | funcname = muB; expr = 2.79*eta(T); args = T; argunit = K; fununit = Pa*s
  mat6: Common "PR" on no domains
    def "Basic"
      thermalexpansioncoefficient = alpha_p(T)
      bulkviscosity = muB(T)
      dynamicviscosity = eta(T)
      ratioofspecificheat = gamma_w(T)
      electricconductivity = (1/rho_PR)*flag+(1/rho_saline)*(1-flag)
      heatcapacity = Cp(T)
      density = rho(T)
      thermalconductivity = k(T)
      soundspeed = cs(T)
      relpermittivity = ep_layers
      eta: Piecewise
        arg = T
        pieces = 
          {273.15, 413.15, 1.3799566804-0.021224019151*T^1+1.3604562827E-4*T^2-4.6454090319E-7*T^3+8.9042735735E-10*T^4-9.0790692686E-13*T^5+3.8457331488E-16*T^6}
          {413.15, 553.75, 0.00401235783-2.10746715E-5*T^1+3.85772275E-8*T^2-2.39730284E-11*T^3}
        argunit = K
        fununit = Pa*s
      Cp: Piecewise | arg = T; pieces = {273.15, 553.75, 12010.1471-80.4072879*T^1+0.309866854*T^2-5.38186884E-4*T^3+3.62536437E-7*T^4}; argunit = K; fununit = J/(kg*K)
      rho: Piecewise
        arg = T
        smooth = contd1
        pieces = 
          {273.15, 293.15, 6.3092789034e-05*T^3-0.0603676398829*T^2+18.9229382407066*T-950.704055329848}
          {293.15, 373.15, 1.0335053319e-05*T^3-0.0133950656345*T^2+4.96928883266*T+432.257114008512}
        argunit = K
        fununit = kg/m^3
      k: Piecewise | arg = T; pieces = {273.15, 553.75, -0.869083936+0.00894880345*T^1-1.58366345E-5*T^2+7.97543259E-9*T^3}; argunit = K; fununit = W/(m*K)
      cs: Interpolation | table = {{273, 1403}, {278, 1427}, {283, 1447}, {293, 1481}, {303, 1507}, {313, 1526}, {323, 1541}, {333, 1552}, {343, 1555}, {353, 1555}, {363, 1550}, {373, 1543}}; interp = piecewisecubic; argunit = K; fununit = m/s
      an1: Analytic | funcname = alpha_p; expr = -1/rho(T)*d(rho(T),T); args = T; argunit = K; fununit = 1/K
      an2: Analytic | funcname = gamma_w; expr = 1+(T/Cp(T))*(alpha_p(T)*cs(T))^2; args = T; argunit = K; fununit = 1
      an3: Analytic | funcname = muB; expr = 2.79*eta(T); args = T; argunit = K; fununit = Pa*s
  mat2: Common "Pt - Platinum" on domains 2, 7, 11
    def "Basic"
      electricconductivity = 8.9e6[S/m]
      thermalexpansioncoefficient = 8.80e-6[1/K]
      heatcapacity = 133[J/(kg*K)]
      density = 21450[kg/m^3]
      thermalconductivity = 71.6[W/(m*K)]
      relpermittivity = 1
    Enu "Young's modulus and Poisson's ratio"
      youngsmodulus = 168e9[Pa]
      poissonsratio = 0.38
  mat8: Common "Acrylic plastic" on domains 8, 10
    def "Basic"
      thermalexpansioncoefficient = 7.0e-5[1/K]
      heatcapacity = 1470[J/(kg*K)]
      density = 1190[kg/m^3]
      thermalconductivity = 0.18[W/(m*K)]
      electricconductivity = sigma_plastic
      relpermittivity = ep_plastic
    Enu "Young's modulus and Poisson's ratio"
      youngsmodulus = 3.2e9[Pa]
      poissonsratio = 0.35

Physics
  ec: ConductiveMedia "Electric Currents" on all domains
    dependent variable V
    cucn1: CurrentConservation (default)
    axi1: AxialSymmetry (default)
    ein1: ElectricInsulation (default)
    init1: init "Initial Values 1" (default)
    pot1: ElectricPotential "Electric Potential 1 return electrode" on boundaries 44-47 | V0 = V_return
    term1: DomainTerminal "Terminal 1 active electrode current injection" on domains 2 | I0 = I_active

Mesh
  mesh1 "Mesh 1"
    size: MeshSizeDefault | hauto = 2
    size1: Size "Custom dense mesh" on domains 2 | hmax = 1[um]; hgrad = 1.3; custom = on
    ftri2: FreeTri "Free Triangular 2" on remaining entities

Studies
  std1 "Study 1"
    stat: Stationary

Solver configurations
  sol1 "Solution 1" (study std1)
    v1: Variables "Dependent Variables 1"
    s1: Stationary "Stationary Solver 1"
      dDef: Direct
      fc1: FullyCoupled | linsolver = dDef

Datasets
  dset1: Solution | solution = sol1
  rev1: Revolve2D "Revolution 2D 1" | data = dset1
  cln1: CutLine2D "Cut line" | data = dset1; genpoints = {{0, z_cut}, {r_cut_lim, z_cut}}
  pc1: ParCurve2D "probeL" | data = dset1; parmax1 = r_cut_lim; exprx = s; expry = z_cut; res1 = 34
  pc2: ParCurve2D "probeL2" | data = dset1; parmax1 = r_cut_lim2; exprx = s; expry = z_cut; res1 = 34
  mesh1: Mesh | mesh = mesh1

Tables
  tbl33: Table
    s | Height
    0 | 0.603591
    30 | 0.0759259
    60 | 0.0283271
    90 | 0.0152449
    120 | 0.00967029
    150 | 0.00664292
    180 | 0.00476204
    210 | 0.00350525
    240 | 0.00263048
    270 | 0.00200617
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  tbl34: Table "no_plug_2mm_30um -2mm retina"
    r [um] | V [V]
    0 | 0.575344
    30 | 0.0596847
    60 | 0.0224524
    90 | 0.0130382
    120 | 0.00867967
    150 | 0.00611363
    180 | 0.00444277
    210 | 0.00329877
    240 | 0.00249185
    270 | 0.00191127
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  tbl35: Table "no_plug_2mm_33.54um-2mm retina"
    r [um] | V [V]
    0 | 0.575344
    33.54 | 0.0507683
    67.08 | 0.0193487
    100.62 | 0.0111838
    134.16 | 0.00732004
    167.7 | 0.00504884
    201.24 | 0.00359137
    234.78 | 0.00261364
    268.32 | 0.00193914
    301.86 | 0.00146512
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  tbl36: Table "plug_2mm_30um-2mm retina"
    r [um] | V [V]
    0 | 0.575321
    30 | 0.0596626
    60 | 0.0224303
    90 | 0.013016
    120 | 0.00865751
    150 | 0.00609146
    180 | 0.00442061
    210 | 0.00327661
    240 | 0.00246969
    270 | 0.00188911
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  tbl37: Table "plug_2mm_33.54um -2mm retina"
    r [um] | V [V]
    0 | 0.575321
    33.54 | 0.0507462
    67.08 | 0.0193266
    100.62 | 0.0111617
    134.16 | 0.00729788
    167.7 | 0.00502668
    201.24 | 0.00356921
    234.78 | 0.00259148
    268.32 | 0.00191698
    301.86 | 0.00144296
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  tbl38: Table "plug_7mm_30um -2mm retina"
    r [um] | V [V]
    0 | 0.575297
    30 | 0.0596383
    60 | 0.022406
    90 | 0.0129918
    120 | 0.00863328
    150 | 0.00606725
    180 | 0.00439642
    210 | 0.00325244
    240 | 0.00244555
    270 | 0.00186501
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  tbl39: Table "plug_7mm_33.54um -2mm retina"
    r [um] | V [V]
    0 | 0.575297
    33.54 | 0.0507219
    67.08 | 0.0193023
    100.62 | 0.0111374
    134.16 | 0.00727366
    167.7 | 0.00500248
    201.24 | 0.00354504
    234.78 | 0.00256734
    268.32 | 0.00189288
    301.86 | 0.0014189
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  tbl40: Table "no_plug_7mm_30um -2mm retina"
    r [um] | V [V]
    0 | 0.575317
    30 | 0.0596584
    60 | 0.022426
    90 | 0.0130118
    120 | 0.00865332
    150 | 0.00608729
    180 | 0.00441646
    210 | 0.00327248
    240 | 0.00246559
    270 | 0.00188505
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  tbl41: Table "no_plug_7mm_33.54um -2mm retina"
    r [um] | V [V]
    0 | 0.575317
    33.54 | 0.050742
    67.08 | 0.0193224
    100.62 | 0.0111575
    134.16 | 0.0072937
    167.7 | 0.00502252
    201.24 | 0.00356508
    234.78 | 0.00258738
    268.32 | 0.00191291
    301.86 | 0.00143893
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  tbl42: Table
    r [um] | V [V]
    0 | 0.575297
    30 | 0.0596383
    60 | 0.022406
    90 | 0.0129918
    120 | 0.00863328
    150 | 0.00606725
    180 | 0.00439642
    210 | 0.00325244
    240 | 0.00244555
    270 | 0.00186501
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  tbl43: Table "plug_7mm_30um - 1mm retina"
    r [um] | V [V]
    0 | 0.575291
    30 | 0.0596417
    60 | 0.0223956
    90 | 0.0129886
    120 | 0.00862891
    150 | 0.00606233
    180 | 0.00439145
    210 | 0.00324742
    240 | 0.0024405
    270 | 0.00185992
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  tbl44: Table "plug_7mm_30um - 1.5mm retina"
    r [um] | V [V]
    0 | 0.575298
    30 | 0.0596128
    60 | 0.022415
    90 | 0.0129908
    120 | 0.00863089
    150 | 0.00606562
    180 | 0.00439513
    210 | 0.00325118
    240 | 0.00244427
    270 | 0.00186368
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  tbl45: Table "plug_7mm_30um - 1.5mm retina - circle return electrode"
    r [um] | V [V]
    0 | 0.575296
    30 | 0.0596107
    60 | 0.0224129
    90 | 0.0129887
    120 | 0.00862878
    150 | 0.00606351
    180 | 0.00439303
    210 | 0.00324908
    240 | 0.00244216
    270 | 0.00186157
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  tbl46: Table "no_plug_7mm_30um - 1.5mm retina"
    r [um] | V [V]
    0 | 0.575316
    30 | 0.0596314
    60 | 0.0224336
    90 | 0.0130094
    120 | 0.00864945
    150 | 0.00608418
    180 | 0.00441369
    210 | 0.00326974
    240 | 0.00246283
    270 | 0.00188224
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  tbl47: Table
    s | Height
    0 | 0.575296
    30 | 0.059611
    60 | 0.0224132
    90 | 0.012989
    120 | 0.00862903
    150 | 0.00606377
    180 | 0.00439328
    210 | 0.00324933
    240 | 0.00244242
    270 | 0.00186182
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  tbl48: Table "plug_7mm_30um - .75mm retina"
    r [um] | V [V]
    0 | 0.575285
    30 | 0.0596158
    60 | 0.0223983
    90 | 0.0129794
    120 | 0.0086202
    150 | 0.00605461
    180 | 0.00438375
    210 | 0.00323959
    240 | 0.0024324
    270 | 0.0018515
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  tbl49: Table "plug_7mm_30um - 2mm retina full return electrode"
    r [um] | V [V]
    0 | 0.575295
    30 | 0.0596365
    60 | 0.0224041
    90 | 0.0129899
    120 | 0.00863142
    150 | 0.00606539
    180 | 0.00439456
    210 | 0.00325059
    240 | 0.00244369
    270 | 0.00186315
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  tbl50: Table "plug_7mm_30um - 1mm retina radius full return electrode"
    r [um] | V [V]
    0 | 0.57529
    30 | 0.0596399
    60 | 0.0223937
    90 | 0.0129868
    120 | 0.00862705
    150 | 0.00606047
    180 | 0.00438959
    210 | 0.00324556
    240 | 0.00243864
    270 | 0.00185807
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  tbl51: Table "new_1.5mm_retina"
    r [um] | V [V]
    0 | 0.575308
    30 | 0.0596227
    60 | 0.0224251
    90 | 0.0130009
    120 | 0.00864095
    150 | 0.0060757
    180 | 0.0044052
    210 | 0.00326125
    240 | 0.00245434
    270 | 0.00187374
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  tbl52: Table "new2 1.5mm retine (high return electrode)"
    r ]um] | V [V]
    0 | 0.575307
    30 | 0.0596217
    60 | 0.0224241
    90 | 0.0129999
    120 | 0.00863996
    150 | 0.0060747
    180 | 0.0044042
    210 | 0.00326025
    240 | 0.00245334
    270 | 0.00187275
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  tbl53: Table "new3 1.5mm retine (higher return electrode)"
    r [um] | V [V]
    0 | 0.575307
    30 | 0.059622
    60 | 0.0224244
    90 | 0.0130002
    120 | 0.00864023
    150 | 0.00607498
    180 | 0.00440447
    210 | 0.00326052
    240 | 0.00245361
    270 | 0.00187302
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  tbl54: Table "new3 1.5mm retine (dense mesh)"
    r [um] | V [V]
    0 | 0.575344
    30 | 0.0596196
    60 | 0.0224208
    90 | 0.0130039
    120 | 0.00864124
    150 | 0.00607485
    180 | 0.00440429
    210 | 0.00326043
    240 | 0.0024536
    270 | 0.00187305
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  tbl55: Table "New_0.75mm radius retina"
    r [um] | V [V]
    0 | 0.575297
    30 | 0.059627
    60 | 0.0224095
    90 | 0.0129906
    120 | 0.0086314
    150 | 0.00606581
    180 | 0.00439494
    210 | 0.00325078
    240 | 0.00244359
    270 | 0.00186269
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  tbl56: Table "New_1mm radius retina"
    r [um] | V [V]
    0 | 0.575301
    30 | 0.0596513
    60 | 0.022405
    90 | 0.012998
    120 | 0.00863824
    150 | 0.00607167
    180 | 0.00440079
    210 | 0.00325675
    240 | 0.00244984
    270 | 0.00186926
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  tbl57: Table "New_2mm radius retina"
    r [um] | V [V]
    0 | 0.575307
    30 | 0.0596067
    60 | 0.0224303
    90 | 0.0130023
    120 | 0.00864141
    150 | 0.00607596
    180 | 0.0044057
    210 | 0.00326187
    240 | 0.00245498
    270 | 0.00187438
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  tbl58: Table "New_1.5mm radius retina"
    r [um] | V [V]
    0 | 0.575307
    30 | 0.059622
    60 | 0.0224244
    90 | 0.0130002
    120 | 0.00864023
    150 | 0.00607498
    180 | 0.00440447
    210 | 0.00326052
    240 | 0.00245361
    270 | 0.00187302
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
Plots
  pg1: PlotGroup2D "Electric Potential (ec)" | data = dset1; dataisaxisym = on
    surf1: Surface | expr = V
  pg2: PlotGroup3D "Electric Potential, Revolved Geometry (ec)" | data = rev1
    surf1: Surface | expr = V
  pg6: PlotGroup2D "Electric Potential (ec) log scale" | data = dset1; dataisaxisym = on
    surf1: Surface | expr = log10(V)
  pg4: PlotGroup1D "1D Plot Stored table plots" | data = dset1
    tblp1: Table "Table Graph 1" (disabled)
      table = tbl34
      xaxisdata = 1
      plotcolumninput = manual
      plotcolumns = 2
      legends = no_plug
    tblp4: Table "Table Graph 4" (disabled)
      table = tbl40
      xaxisdata = 1
      plotcolumninput = manual
      plotcolumns = 2
      legends = no plug -2mm retina
    tblp2: Table "Table Graph 2" (disabled)
      table = tbl36
      xaxisdata = 1
      plotcolumninput = manual
      plotcolumns = 2
      legends = plug
    tblp3: Table "Table Graph 3" (disabled)
      table = tbl38
      xaxisdata = 1
      plotcolumninput = manual
      plotcolumns = 2
      legends = plug -2mm retina
    tblp5: Table "Table Graph 5" (disabled)
      table = tbl43
      xaxisdata = 1
      plotcolumninput = manual
      plotcolumns = 2
      legends = 1 mm retina
    tblp6: Table "Table Graph 6" (disabled)
      table = tbl44
      xaxisdata = 1
      plotcolumninput = manual
      plotcolumns = 2
      legends = 1.5 mm retina
    tblp7: Table "Table Graph 7" (disabled)
      table = tbl45
      xaxisdata = 1
      plotcolumninput = manual
      plotcolumns = 2
      legends = full return electrode 1.5mm retina
    tblp9: Table "Table Graph 9" (disabled)
      table = tbl46
      xaxisdata = 1
      plotcolumninput = manual
      plotcolumns = 2
      legends = no plug 1.5mm radius retina
    tblp10: Table "Table Graph 10" (disabled)
      table = tbl48
      xaxisdata = 1
      plotcolumninput = manual
      plotcolumns = 2
      legends = plug .75mm radius retina
    tblp12: Table "Table Graph 12" (disabled)
      table = tbl50
      xaxisdata = 1
      plotcolumninput = manual
      plotcolumns = 2
      legends = plug 1mm radius retina
    tblp8: Table "Table Graph 8" (disabled)
      table = tbl45
      xaxisdata = 1
      plotcolumninput = manual
      plotcolumns = 2
      legends = plug 1.5mm radius retina
    tblp11: Table "Table Graph 11" (disabled)
      table = tbl49
      xaxisdata = 1
      plotcolumninput = manual
      plotcolumns = 2
      legends = plug 2mm radius retina
    tblp13: Table "Table Graph 13" (disabled)
      table = tbl51
      xaxisdata = 1
      plotcolumninput = manual
      plotcolumns = 2
      legends = new model 1.5mm radius retina
    tblp14: Table "Table Graph 14" (disabled)
      table = tbl52
      xaxisdata = 1
      plotcolumninput = manual
      plotcolumns = 2
      legends = new2 model 1.5mm radius retina
    tblp15: Table "Table Graph 15" (disabled)
      table = tbl53
      xaxisdata = 1
      plotcolumninput = manual
      plotcolumns = 2
      legends = new3 model 1.5mm radius retina
    tblp16: Table "Table Graph 16" (disabled)
      table = tbl54
      xaxisdata = 1
      plotcolumninput = manual
      plotcolumns = 2
      legends = new3 model 1.5mm radius retina (dense)
    tblp17: Table "Table Graph 17"
      table = tbl55
      xaxisdata = 1
      plotcolumninput = manual
      plotcolumns = 2
      legends = New model 0.75mm retina
    tblp18: Table "Table Graph 18"
      table = tbl56
      xaxisdata = 1
      plotcolumninput = manual
      plotcolumns = 2
      legends = New model 1mm retina
    tblp20: Table "Table Graph 20"
      table = tbl58
      xaxisdata = 1
      plotcolumninput = manual
      plotcolumns = 2
      legends = New model 1.5mm retina
    tblp19: Table "Table Graph 19"
      table = tbl57
      xaxisdata = 1
      plotcolumninput = manual
      plotcolumns = 2
      legends = New model 2mm retina
  pg5: PlotGroup2D "Conductivity profile" | data = dset1
    surf1: Surface | expr = log10(ec.sigmarr)
  pg7: PlotGroup1D "1D Plot Group probe lines" | data = dset1
    lngr1: LineGraph | data = pc1; expr = V; xdata = expr; xdataexpr = r
    lngr2: LineGraph | data = pc2; expr = V; xdata = expr; xdataexpr = r
  pg8: PlotGroup2D "Mesh Plot 8" | data = mesh1
    mesh1: Mesh
  pg9: PlotGroup2D "Mesh Plot 9" | data = mesh1
    mesh1: Mesh

Exports
  plot1: Plot